a_1 := 10
σ_1 := 0.5
x_1 := 5
a_2 := 15
σ_2 := 2
x_2 := 25
a_3 := 10
σ_3 := 5
x_3 := 35
f(x) := a_1/(sqrt(2*π)*σ_1)*e^(-|(x - x_1)/(2*σ_1)|) + a_2/(sqrt(2*π)*σ_2)*e^(-(x - x_2)^2/(2*σ_2^2)) + a_3/(sqrt(2*π)*σ_3)*e^(-(x - x_3)^2/(2*σ_3^2))
L := 120
N := 800
Δ := L/N
i := 1 .. N
x[i] := -L/2 + i*Δ
fi[i] := f(x[i])
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σ_R := 4
η(x) :=
    1 if x < 0
    1 otherwise
Rf(τ) := 1/(sqrt(2*π)*σ_R)*e^(-1/2*(τ/σ_R)^2)*η(τ)
fm(x) := integral(f(τ)*Rf(x - τ), τ = x*(-4)*σ_R .. x + 4*σ_R)
I[i] := fm(x[i])
integral(Rf(τ), τ = -4*σ_R .. 4*σ_R) = 0.999937
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I_ω := cfft(I)
f_ω := cfft(fi)
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Rfi[i] := Rf(x[i])
F_R := cfft(Rfi)
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a[i] := I_ω[i]/(2*π*F_R[i])
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ar := icfft(a) + 1/2
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